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/batch
! ANSYS input file written by Workbench version 2025 R1
! File used for geometry attach: C:\Users\fgley\OneDrive\Bureau\PROFESSIONAL\CANADA\5_Cours\H25_MEC8211\0_Devoir 1\MEC8211_projet\02 - Simulation\Verif_Code_files\dp0\SYS-1\DM\SYS-1.agdb
/title,Verif_Code--Static Structural (B5)
/COM,/COM,     ANSYSMotion, 2025.1
/com,--- Data in consistent MKS units. See Solving Units in the help system for more information.
/units,MKS
/prep7
! Turn off shape checking because checks already performed inside WB mesher.
! See help system for more information.
SHPP,OFF,,NOWARN
etcon,set             ! allow ANSYS to choose best KEYOP's for 180x elements, resets any applicable keyopt to MAPDL defaults
/com,*********** Nodes for the whole assembly ***********
nblock,3,,12
(1i9,3e20.9e3)
        1     0.000000000E+00     0.000000000E+00     0.000000000E+00
        2     0.000000000E+00     1.600000000E+00     0.000000000E+00
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-1
/com,*********** Elements for Body 1 'Line Body' ***********
et,1,188
keyo,1,3,2
eblock,19,solid,,5
(19i9)
        1        1        1        1        0        0        0        0        3        0        1        1        3        7
        1        1        1        1        0        0        0        0        3        0        2        3        4        8
        1        1        1        1        0        0        0        0        3        0        3        4        5        9
        1        1        1        1        0        0        0        0        3        0        4        5        6       10
        1        1        1        1        0        0        0        0        3        0        5        6        2       11
-1
/com,*********** Send User Defined Coordinate System(s) ***********
csys,0
toffst,273.15,      ! Temperature offset from absolute zero
/com,*********** Set Reference Temperature ***********
tref,22.
/com,*********** Send Materials ***********
MP,EX,1,20000000,	! Pa
MP,NUXY,1,0.4,

/com,*********** Send Beam Properties ***********
SECTYPE,1,BEAM,RECT
SECDATA,8.e-002,4.e-002
secoffset,cent

!************************* Model Summary ********************
!Line Body,	resine,	matid,	1
!************************* End Model Summary ********************
/com,*********** Fixed Supports ***********
CMBLOCK,_FIXEDSU,NODE,        1
(8i10)
         1
cmsel,s,_FIXEDSU
d,all,all
nsel,all
/com,*********** Define Vertex Force Using Follower Elements ***********
et,2,201
keyo,2,1,1          ! Keep the direction constant
keyo,2,2,1          ! Apply Forces only, not moment
mat,2
real,2
type,2
en,6,2
r,2
rmod,2,1,1.0,              ! FX
mat,3
real,3
type,2
en,7,2
r,3
rmod,3,2,1.0,              ! FY
mat,4
real,4
type,2
en,8,2
r,4
rmod,4,3,1.0,              ! FZ
fini
/com,****************************************************************************
/com,*************************    SOLUTION       ********************************
/com,****************************************************************************
/solu
antype,0                   ! static analysis
_thickRatio=  0     ! Ratio of thick parts in the model
eqsl,sparse,,,,,1
cntr,print,1               ! print out contact info and also make no initial contact an error
cncheck,dmp		!	Enable program controlled contact splitting for distributed memory parallel run
dmpoption,emat,no             ! Don't combine emat file for DANSYS
dmpoption,esav,no             ! Don't combine esav file for DANSYS
nldiag,cont,iter           ! print out contact info each equilibrium iteration
rescontrol,,none                 ! Do not keep any restart files
/com,****************************************************
/com,******************* SOLVE FOR LS 1 OF 1 ****************
esel,s,real,,2
sfe,all,1,pres,1,-30.
esel,s,real,,3
sfe,all,1,pres,1,0.
esel,s,real,,4
sfe,all,1,pres,1,0.
esel,all
nsub,1,1,1
time,1.
outres,erase
outres,all,none
outres,nsol,all,
outres,rsol,all
outres,eangl,all
outres,etmp,all
outres,veng,all
outres,strs,all,
outres,epel,all,
outres,eppl,all,
outres,cont,all,
esel,s,type,,1
cm,_elmisc,elem
esel,all
outres,misc,all,_elmisc
! *********** WB SOLVE COMMAND ***********
! check interactive state
*get,ANSINTER_,active,,int
*if,ANSINTER_,ne,0,then
/eof
*endif
solve
/com *************** Write FE CONNECTORS *********
CEWRITE,file,ce,,INTE
/com,****************************************************
/com,*************** FINISHED SOLVE FOR LS 1 *************
*get,_NSOLTHREADS,active,0,ntfs
*get,_NSOLPROCESSES,active,0,npfs
/post1
fini
